Gr := [
    1, 0, 1, 1, 0, 0, 1, 0, 0, 0, 0, 0, 0, 0;
    0, 1, 0, 0, 0, 0, 0, 0, 0, 0, 1, 0, 0, 0;
    0, 0, 1, 1, 1, 0, 0, 0, 0, 0, 0, 0, 0, 0;
    0, 1, 0, 1, 0, 0, 0, 0, 0, 1, 0, 0, 0, 0;
    0, 0, 0, 0, 1, 1, 0, 1, 0, 0, 0, 0, 0, 1;
    0, 0, 0, 0, 0, 1, 0, 0, 1, 0, 0, 0, 0, 0;
    0, 0, 0, 0, 0, 0, 1, 0, 0, 0, 0, 0, 1, 0;
    0, 0, 0, 0, 0, 0, 1, 1, 0, 0, 0, 0, 0, 0;
    0, 0, 0, 0, 0, 0, 0, 0, 1, 0, 0, 0, 0, 0;
    0, 0, 0, 0, 0, 0, 0, 0, 1, 1, 0, 0, 0, 0;
    0, 0, 0, 1, 0, 0, 0, 0, 0, 0, 1, 0, 0, 0;
    0, 0, 0, 0, 0, 0, 0, 0, 0, 0, 0, 1, 1, 0;
    0, 0, 0, 0, 0, 1, 0, 0, 0, 0, 0, 1, 1, 0;
    1, 0, 0, 0, 0, 0, 1, 0, 0, 0, 0, 0, 0, 1
]
TC21 := Gr*Gr
TC22 := TC21*TC21
TC23 := TC22*TC22
TC24 := TC23*TC23 = [
    16512, 98176, 16384, 109227, 16256, 163714, 49406, 16384, 226868, 98176, 87381, 147330, 171968, 16384;
    0, 21845, 0, 21846, 0, 0, 0, 0, 21829, 21844, 21845, 0, 0, 0;
    16384, 87382, 16512, 98432, 16384, 155457, 49279, 16256, 207292, 87382, 76330, 139201, 163968, 16256;
    0, 21845, 0, 21845, 0, 0, 0, 0, 21846, 21845, 21846, 0, 0, 0;
    16256, 76587, 16384, 87381, 16512, 180352, 48896, 16384, 220993, 76587, 65536, 163968, 188480, 16384;
    0, 0, 0, 0, 0, 1, 0, 0, 16, 0, 0, 0, 0, 0;
    0, 0, 0, 0, 0, 32767, 1, 0, 32752, 0, 0, 32767, 32768, 0;
    0, 0, 0, 0, 0, 32752, 16, 1, 32647, 0, 0, 32752, 32767, 0;
    0, 0, 0, 0, 0, 0, 0, 0, 1, 0, 0, 0, 0, 0;
    0, 0, 0, 0, 0, 0, 0, 0, 16, 1, 0, 0, 0, 0;
    0, 21846, 0, 21845, 0, 0, 0, 0, 21844, 21846, 21845, 0, 0, 0;
    0, 0, 0, 0, 0, 32767, 0, 0, 32752, 0, 0, 32768, 32768, 0;
    0, 0, 0, 0, 0, 32768, 0, 0, 32767, 0, 0, 32768, 32768, 0;
    16384, 87381, 16256, 98176, 16384, 172239, 49008, 16511, 224276, 87381, 76587, 155728, 180097, 16512
]
TC1 := Gr^14 = [
    4096, 21845, 4032, 24512, 4096, 34914, 12222, 4160, 47942, 21845, 19179, 30754, 36800, 4160;
    0, 5461, 0, 5461, 0, 0, 0, 0, 5448, 5460, 5462, 0, 0, 0;
    4160, 19050, 4096, 21846, 4032, 32705, 12415, 4096, 43120, 19050, 16384, 28609, 34784, 4096;
    0, 5462, 0, 5461, 0, 0, 0, 0, 5461, 5462, 5461, 0, 0, 0;
    4096, 16384, 4160, 19179, 4096, 38816, 12352, 4032, 46294, 16384, 13589, 34784, 41024, 4032;
    0, 0, 0, 0, 0, 1, 0, 0, 14, 0, 0, 0, 0, 0;
    0, 0, 0, 0, 0, 8191, 1, 0, 8178, 0, 0, 8191, 8192, 0;
    0, 0, 0, 0, 0, 8178, 14, 1, 8100, 0, 0, 8178, 8191, 0;
    0, 0, 0, 0, 0, 0, 0, 0, 1, 0, 0, 0, 0, 0;
    0, 0, 0, 0, 0, 0, 0, 0, 14, 1, 0, 0, 0, 0;
    0, 5461, 0, 5462, 0, 0, 0, 0, 5460, 5461, 5461, 0, 0, 0;
    0, 0, 0, 0, 0, 8191, 0, 0, 8178, 0, 0, 8192, 8192, 0;
    0, 0, 0, 0, 0, 8192, 0, 0, 8191, 0, 0, 8192, 8192, 0;
    4032, 19179, 4096, 21845, 4160, 36941, 12146, 4095, 47086, 19179, 16384, 32846, 38945, 4096
]
