A2 := A1*v  # error: This variable is undefined.
A1 := [
    0, 0, 1/3, 1/3, 0, 0, 1/3, 0, 0, 0, 0, 0, 0, 0;
    0, 0, 0, 0, 0, 0, 0, 0, 0, 0, 1, 0, 0, 0;
    0, 0, 0, 1/2, 1/2, 0, 0, 0, 0, 0, 0, 0, 0, 0;
    0, 1/2, 0, 0, 0, 0, 0, 0, 0, 1/2, 0, 0, 0, 0;
    0, 0, 0, 0, 0, 1/3, 0, 1/3, 0, 0, 0, 0, 0, 1/3;
    0, 0, 0, 0, 0, 0, 0, 0, 1, 0, 0, 0, 0, 0;
    0, 0, 0, 0, 0, 0, 0, 0, 0, 0, 0, 0, 1, 0;
    0, 0, 0, 0, 0, 0, 1, 0, 0, 0, 0, 0, 0, 0;
    0, 0, 0, 0, 0, 0, 0, 0, 0, 0, 0, 0, 0, 0;
    0, 0, 0, 0, 0, 0, 0, 0, 1, 0, 0, 0, 0, 0;
    0, 0, 0, 1, 0, 0, 0, 0, 0, 0, 0, 0, 0, 0;
    0, 0, 0, 0, 0, 0, 0, 0, 0, 0, 0, 0, 1, 0;
    0, 0, 0, 0, 0, 1/2, 0, 0, 0, 0, 0, 1/2, 0, 0;
    1/2, 0, 0, 0, 0, 0, 1/2, 0, 0, 0, 0, 0, 0, 0
]
v := [1/14, 1/14, 1/14, 1/14, 1/14, 1/14, 1/14, 1/14, 1/14, 1/14, 1/14, 1/14, 1/14, 1/14]
v1 := transpose(v) = [0.0714286; 0.0714286; 0.0714286; 0.0714286; 0.0714286; 0.0714286; 0.0714286; 0.0714286; 0.0714286; 0.0714286; 0.0714286; 0.0714286; 0.0714286; 0.0714286]
A2 := transpose(A1) = [
    0, 0, 0, 0, 0, 0, 0, 0, 0, 0, 0, 0, 0, 0.5;
    0, 0, 0, 0.5, 0, 0, 0, 0, 0, 0, 0, 0, 0, 0;
    0.333333, 0, 0, 0, 0, 0, 0, 0, 0, 0, 0, 0, 0, 0;
    0.333333, 0, 0.5, 0, 0, 0, 0, 0, 0, 0, 1, 0, 0, 0;
    0, 0, 0.5, 0, 0, 0, 0, 0, 0, 0, 0, 0, 0, 0;
    0, 0, 0, 0, 0.333333, 0, 0, 0, 0, 0, 0, 0, 0.5, 0;
    0.333333, 0, 0, 0, 0, 0, 0, 1, 0, 0, 0, 0, 0, 0.5;
    0, 0, 0, 0, 0.333333, 0, 0, 0, 0, 0, 0, 0, 0, 0;
    0, 0, 0, 0, 0, 1, 0, 0, 0, 1, 0, 0, 0, 0;
    0, 0, 0, 0.5, 0, 0, 0, 0, 0, 0, 0, 0, 0, 0;
    0, 1, 0, 0, 0, 0, 0, 0, 0, 0, 0, 0, 0, 0;
    0, 0, 0, 0, 0, 0, 0, 0, 0, 0, 0, 0, 0.5, 0;
    0, 0, 0, 0, 0, 0, 1, 0, 0, 0, 0, 1, 0, 0;
    0, 0, 0, 0, 0.333333, 0, 0, 0, 0, 0, 0, 0, 0, 0
]
R2 := A2*A2*v1 = [0.0119048; 0.0654762; 0.0119048; 0.0952381; 0.0119048; 0.0833333; 0.047619; 0.0119048; 0.0952381; 0.0654762; 0.0357143; 0.0714286; 0.166667; 0.0119048]
R1 := A2*v1 = [0.0357143; 0.0357143; 0.0238095; 0.130952; 0.0357143; 0.0595238; 0.130952; 0.0238095; 0.142857; 0.0357143; 0.0714286; 0.0357143; 0.142857; 0.0238095]
R3 := A2*A2*A2*v1 = [0.00595238; 0.047619; 0.00396825; 0.0456349; 0.00595238; 0.0873016; 0.0218254; 0.00396825; 0.14881; 0.047619; 0.0654762; 0.0833333; 0.119048; 0.00396825]
R5 := A2^5*v1 = [0.000992063; 0.0347222; 0.000661376; 0.0492725; 0.000992063; 0.0532407; 0.00363757; 0.000661376; 0.0843254; 0.0347222; 0.0228175; 0.0525794; 0.0674603; 0.000661376]
R8 := A2^8*v1 = [5.51146e-5; 0.0174989; 5.51146e-5; 0.0247465; 5.51146e-5; 0.0175816; 0.000220459; 5.51146e-5; 0.0399581; 0.0174989; 0.0117394; 0.0175265; 0.0287147; 5.51146e-5]
R6 := A2^6*v1 = [0.000330688; 0.0246362; 0.000330688; 0.0234788; 0.000330688; 0.0340608; 0.00132275; 0.000330688; 0.087963; 0.0246362; 0.0347222; 0.0337302; 0.0562169; 0.000330688]
R7 := A2^7*v1 = [0.000165344; 0.0117394; 0.000110229; 0.0349978; 0.000165344; 0.0282187; 0.000606261; 0.000110229; 0.0586971; 0.0117394; 0.0246362; 0.0281085; 0.0350529; 0.000110229]
Ti := sum(R8) = 0.175761
R4 := A2^4*v1 = [0.00198413; 0.0228175; 0.00198413; 0.0694444; 0.00198413; 0.0615079; 0.00793651; 0.00198413; 0.134921; 0.0228175; 0.047619; 0.0595238; 0.105159; 0.00198413]
# 100 | 0.176
# x | 0.29
frs := 0.017*100/0.176 = 9.65909
