v := [
    1/19;
    1/19;
    1/19;
    1/19;
    1/19;
    1/19;
    1/19;
    1/19;
    1/19;
    1/19;
    1/19;
    1/19;
    1/19;
    1/19;
    1/19;
    1/19;
    1/19;
    1/19;
    1/19
]
A1 := [
    0, 0, 0, 0, 0, 0, 0, 0, 0, 0, 0, 0, 0, 1/2, 1, 1, 0, 0, 0;
    0, 0, 0, 1/2, 0, 0, 0, 0, 0, 0, 0, 0, 0, 0, 0, 0, 0, 0, 0;
    1/4, 0, 0, 0, 0, 0, 0, 0, 0, 0, 0, 0, 0, 0, 0, 0, 0, 0, 0;
    1/4, 0, 1/2, 0, 0, 0, 0, 0, 0, 0, 1, 0, 0, 0, 0, 0, 0, 0, 0;
    0, 0, 1/2, 0, 0, 0, 0, 0, 0, 0, 0, 0, 0, 0, 0, 0, 0, 0, 0;
    0, 0, 0, 0, 1/3, 0, 0, 0, 0, 0, 0, 0, 1/2, 0, 0, 0, 0, 0, 0;
    1/4, 0, 0, 0, 0, 0, 0, 1, 0, 0, 0, 0, 0, 1/2, 0, 0, 0, 0, 0;
    0, 0, 0, 0, 1/3, 0, 0, 0, 0, 0, 0, 0, 0, 0, 0, 0, 0, 0, 0;
    0, 0, 0, 0, 0, 1, 0, 0, 0, 1, 0, 0, 0, 0, 0, 0, 0, 0, 0;
    0, 0, 0, 1/2, 0, 0, 0, 0, 0, 0, 0, 0, 0, 0, 0, 0, 0, 0, 0;
    0, 1, 0, 0, 0, 0, 0, 0, 0, 0, 0, 0, 0, 0, 0, 0, 0, 0, 0;
    0, 0, 0, 0, 0, 0, 0, 0, 0, 0, 0, 0, 1/2, 0, 0, 0, 0, 0, 0;
    0, 0, 0, 0, 0, 0, 1, 0, 0, 0, 0, 1, 0, 0, 0, 0, 0, 0, 0;
    0, 0, 0, 0, 1/3, 0, 0, 0, 0, 0, 0, 0, 0, 0, 0, 0, 0, 0, 0;
    0, 0, 0, 0, 0, 0, 0, 0, 0, 0, 0, 0, 0, 0, 0, 0, 0, 0, 0;
    0, 0, 0, 0, 0, 0, 0, 0, 0, 0, 0, 0, 0, 0, 0, 0, 0, 0, 0;
    1/4, 0, 0, 0, 0, 0, 0, 0, 0, 0, 0, 0, 0, 0, 0, 0, 0, 0, 0;
    0, 0, 0, 0, 0, 0, 0, 0, 0, 0, 0, 0, 0, 0, 0, 0, 0, 0, 0;
    0, 0, 0, 0, 0, 0, 0, 0, 0, 0, 0, 0, 0, 0, 0, 0, 0, 0, 0
]
res := A1^8*v = [2.28436e-5; 0.0122556; 2.28436e-5; 0.0234832; 2.28436e-5; 0.0158077; 9.13743e-5; 0.000114218; 0.0345852; 0.0122556; 0.0116502; 0.0156935; 0.0232091; 0.000114218; 0; 0; 2.28436e-5; 0; 0]
R8 := A2^8*v1  # error: This variable is undefined.
